// SBML level 3 version 1

model ChainABC()

  // Compartments:
  compartment default = 1; default is "standard";

  // Species:
  species A in default = 1; A is "Initial Concentration A";
  species B in default = 0; B is "Initial Concentration B";
  species C in default = 0; C is "Initial Concentration C";

  // Parameters:
  k1 = 2; k1 is "Reaction Rate A -> B";
  k_1 = 0.003; k_1 is "Reaction Rate B -> A";
  k2 = 1; k2 is "Reaction Rate B -> C";
  k_2 = 0.002; k_2 is "Reaction Rate C -> B";

  // Reactions:
  re001: A => B; k1*A;
  r002: B => A; k_1*B;
  re003: B => C; k2*B;
  re004: C => B; k_2*C;
end
