// SBML level 3 version 1

function Hplus(y, thrs, n)
  (y/thrs)^n/(1 + (y/thrs)^n);
end

function Hminus(y, thrs, n)
  1/(1 + (y/thrs)^n);
end

model PAEON_V2__OvF_ne_0()

  // Compartments:
  compartment default = 1; default is "body (volume?)";

  // Species:
  species LH_pit in default = 259696; LH_pit is "LH in the pituitary";
  species LH_blood in default = 2.71; LH_blood is "LH in the blood";
  species R_LH in default = 8.398; R_LH is "Receptors LH";
  species LH_R in default = 0.266; LH_R is "LH-receptor-complex";
  species R_LH_des in default = 0.71; R_LH_des is "Receptors LH internalised";
  species FSH_pit in default = 59734; FSH_pit is "FSH in the pituitary";
  species FSH_blood in default = 5.28; FSH_blood is "FSH in the blood";
  species R_FSH in default = 5.903; R_FSH is "Receptors FSH";
  species FSH_R in default = 0.796; FSH_R is "FSH-receptor-complex";
  species R_FSH_des in default = 1.8; R_FSH_des is "Receptors FSH internalised";
  species S_foll in default = 0.156; S_foll is "Follicular sensitivity to LH";
  species AF1 in default = 2.593; AF1 is "Antral follicle develop. stage 1";
  species AF2 in default = 23.14; AF2 is "Antral follicle develop. stage 2";
  species AF3 in default = 0.492; AF3 is "Antral follicle develop. stage 3";
  species AF4 in default = 1.61e-5; AF4 is "Antral follicle develop. stage 4";
  species PrF in default = 0.2449; PrF is "Pre-ovulatory follicle stage";
  species OvF in default = 1e-16; OvF is "Ovulatory follicle stage";
  species Sc1 in default = 1e-8; Sc1 is "Ovulatory scar 1";
  species Sc2 in default = 2e-6; Sc2 is "Ovulatory scar 2";
  species Lut1 in default = 2e-5; Lut1 is "Corpus luteum develop. stage 1";
  species Lut2 in default = 0.0003; Lut2 is "Corpus luteum develop. stage 2";
  species Lut3 in default = 0.003; Lut3 is "Corpus luteum develop. stage 3";
  species Lut4 in default = 0.011; Lut4 is "Corpus luteum develop. stage 4";
  species E2 in default = 41.36; E2 is "Estradiol";
  species Progesterone in default = 1.978;
  species InhA in default = 0.93; InhA is "Inhibin A";
  species InhB in default = 60.53; InhB is "Inhibin B";
  species InhA_tau in default = 71.14; InhA_tau is "Inhibin A delay component";
  species GnRH_G in default = 0.0152;
  species R_GnRH_a in default = 0.009; R_GnRH_a is "active Receptors GnRH";
  species R_GnRH_i in default = 0.00096; R_GnRH_i is "inactive Receptors GnRH";
  species GnRH_R_a in default = 6.5e-5; GnRH_R_a is "active GnRH-receptor-complex";
  species GnRH_R_i in default = 5.9e-5; GnRH_R_i is "inactive GnRH-receptor-complex";

  // Parameters:
  p_001_001 = 7309.92; p_001_001 is "basal LH synthesis rate constant";
  p_001_002 = 7309.92; p_001_002 is "E2 promoted LH synthesis rate constant";
  p_001_003 = 192.2; p_001_003 is "threshold of E2 on LH synthesis";
  p_001_004 = 10; p_001_004 is "Hill exponent";
  p_001_005 = 2.371; p_001_005 is "threshold of P4 on LH synthesis";
  p_001_006 = 1; p_001_006 is "Hill exponent";
  p_001_007 = 0.00476; p_001_007 is "basal LH release rate constant";
  p_001_008 = 0.1904; p_001_008 is "GnRH_R_a promoted LH release rate constant";
  p_001_009 = 0.0003; p_001_009 is "threshold of GnRH_R_a on LH release";
  p_001_010 = 5; p_001_010 is "Hill exponent";
  p_002_001 = 5; p_002_001 is "blood volume";
  p_002_002 = 2.143; p_002_002 is "binding rate of LH to its receptor";
  p_002_003 = 74.851; p_002_003 is "clearance rate of LH from the blood";
  p_003_001 = 68.949; p_003_001 is "formation rate of free LH receptors";
  p_004_001 = 183.36; p_004_001 is "desensitisation rate of LH receptor complex";
  p_006_001 = 22130; p_006_001 is "basal FSH synthesis rate constant";
  p_006_002 = 95.81; p_006_002 is "threshold of InhA_tau in FSH synthesis";
  p_006_003 = 5; p_006_003 is "Hill exponent";
  p_006_004 = 70; p_006_004 is "threshold of InhB in FSH synthesis";
  p_006_005 = 3; p_006_005 is "Hill exponent";
  p_006_006 = 10; p_006_006 is "threshold of GnRH frequency in FSH synthesis";
  p_006_007 = 3; p_006_007 is "Hill exponent";
  p_006_008 = 0.057; p_006_008 is "basal FSH release rate constant";
  p_006_009 = 0.272; p_006_009 is "stimulation of FSH release by GnRH rec.";
  p_006_010 = 0.0003; p_006_010 is "threshold of GnRH on FSH release";
  p_006_011 = 3; p_006_011 is "Hill exponent";
  p_007_001 = 3.529; p_007_001 is "binding rate of FSH to its receptor";
  p_007_002 = 114.25; p_007_002 is "clearance rate of FSH from blood";
  p_008_001 = 61.029; p_008_001 is "formation rate of free FSH receptors";
  p_009_001 = 138.3; p_009_001 is "desensitisation rate of FSH receptos complex";
  p_011_001 = 0.219; p_011_001 is "synth. rate const. of FSH_blood to S_foll";
  p_011_002 = 3; p_011_002 is "threshold of FSH_blood to stimulate S_foll";
  p_011_003 = 5; p_011_003 is "Hill exponent";
  p_011_004 = 1.343; p_011_004 is "S_foll clearance rate constant";
  p_011_005 = 1.235; p_011_005 is "threshold of P4 on clearance of S_foll";
  p_011_006 = 5; p_011_006 is "Hill exponent";
  p_011_007 = 0.2; p_011_007 is "additional clearance rate";
  p_012_001 = 3.663; p_012_001 is "growth rate of AF1";
  p_012_002 = 0.608; p_012_002 is "threshold of FSH_R for stimul. of AF1";
  p_012_003 = 3; p_012_003 is "Hill exponent";
  p_012_004 = 1.221; p_012_004 is "transition rate constant from AF1 to AF2";
  p_013_001 = 4.882; p_013_001 is "transition rate constant from AF2 to AF3";
  p_013_002 = 2.726; p_013_002 is "scaling of LH receptor complex";
  p_013_003 = 3.689; p_013_003 is "Hill exponent";
  p_014_001 = 0.122; p_014_001 is "self growth rate of AF3";
  p_014_002 = 10; p_014_002 is "maximum size of AF3 and AF4";
  p_014_003 = 122.06; p_014_003 is "transition rate constant from AF3 to AF4";
  p_014_004 = 5; p_014_004 is "Hill exponent";
  p_015_001 = 12.206; p_015_001 is "self growth rate of AF4";
  p_015_002 = 2; p_015_002 is "Hill exponent";
  p_015_003 = 332.75; p_015_003 is "transition rate constant from AF4 to PrF";
  p_016_001 = 122.06; p_016_001 is "elimination rate of PrF";
  p_016_002 = 6; p_016_002 is "Hill exponent";
  p_017_001 = 7.984; p_017_001 is "growth rate of OvF";
  p_017_002 = 3; p_017_002 is "threshold of PrF for OvF formation";
  p_017_003 = 10; p_017_003 is "Hill exponent";
  p_017_004 = 12.206; p_017_004 is "elimination rate constant of OvF";
  p_018_001 = 1.208; p_018_001 is "growth rate of Sc1 stimulated by OvF";
  p_018_002 = 0.02; p_018_002 is "threshold of OvF to form Sc1";
  p_018_003 = 10; p_018_003 is "Hill exponent";
  p_018_004 = 1.221; p_018_004 is "transition rate constant from Sc1 to Sc2";
  p_019_001 = 0.958; p_019_001 is "transition rate from Sc2 to Lut1";
  p_020_001 = 0.925; p_020_001 is "transition rate constant from Lut1 to Lut2";
  p_020_002 = 20; p_020_002 is "rate of GnRH_R_a to the luteal development";
  p_020_003 = 0.0008; p_020_003 is "threshold of GnRH_R_a to the luteal development";
  p_020_004 = 5; p_020_004 is "Hill exponent";
  p_021_001 = 0.7567; p_021_001 is "transition rate constant from Lut2 to Lut3";
  p_022_001 = 0.61; p_022_001 is "transition rate constant from Lut3 to Lut4";
  p_023_001 = 0.543; p_023_001 is "clearance rate constant of Lut4";
  p_024_001 = 51.558; p_024_001 is "basal E2 production";
  p_024_002 = 2.0945; p_024_002 is "production of E2 by AF2";
  p_024_003 = 9.28; p_024_003 is "production of E2 by LH and AF3";
  p_024_004 = 3480.27; p_024_004 is "production of E2 by AF4";
  p_024_005 = 0.972; p_024_005 is "production of E2 by LH and PrF";
  p_024_006 = 1713.71; p_024_006 is "production of E2 by Lut1";
  p_024_007 = 8675.14; p_024_007 is "production of E2 by Lut4";
  p_024_008 = 5.235; p_024_008 is "E2 clearance rate constant";
  p_025_001 = 0.943; p_025_001 is "basal P4 production";
  p_025_002 = 761.64; p_025_002 is "production of P4 by Lut4";
  p_025_003 = 5.13; p_025_003 is "P4 clearance rate constant";
  p_026_001 = 1.445; p_026_001 is "basal InhA production";
  p_026_002 = 2.285; p_026_002 is "production of InhA by PrF";
  p_026_003 = 60; p_026_003 is "production of InhA by Sc1";
  p_026_004 = 180; p_026_004 is "production of InhA by Lut1";
  p_026_005 = 28.211; p_026_005 is "production of InhA by Lut2";
  p_026_006 = 194.07; p_026_006 is "production of InhA by Lut3";
  p_026_007 = 114.25; p_026_007 is "production of InhA by Lut4";
  p_026_008 = 4.287; p_026_008 is "InhA clearance rate constant";
  p_027_001 = 89.943; p_027_001 is "basal InhB production";
  p_027_002 = 447.47; p_027_002 is "production of InhB by AF2";
  p_027_003 = 132240.2; p_027_003 is "production of InhB by AF3";
  p_027_004 = 172.45; p_027_004 is "InhB clearance rate constant";
  p_028_001 = 0.199; p_028_001 is "clearance of InhA in delayed compartment";
  p_029_001 = 16; p_029_001 is "mean GnRH_G frequency";
  p_029_002 = 3; p_029_002 is "threshold of P4 for inhibition of GnRH_G frequency";
  p_029_003 = 2; p_029_003 is "Hill exponent";
  p_029_004 = 1; p_029_004 is "factor for stimulation by E2";
  p_029_005 = 220; p_029_005 is "threshold of E2 for stimulation of GnRH_G frequency";
  p_029_006 = 10; p_029_006 is "Hill exponent";
  p_030_001 = 0.005593; p_030_001 is "amount of GnRH released by one puls at E2 level height";
  p_030_002 = 220; p_030_002 is "threshold of E2 for stimulation of GnRH mass";
  p_030_003 = 2; p_030_003 is "Hill exponent";
  p_030_004 = 9.6; p_030_004 is "threshold of E2 for inhibition of GnRH mass";
  p_030_005 = 1; p_030_005 is "Hill exponent";
  p_031_001 = 322.18; p_031_001 is "binding rate of GnRH_G to its receptor";
  p_031_002 = 644.35; p_031_002 is "breakup rate of GnRH-receptor-complex";
  p_031_003 = 0.447; p_031_003 is "degradation rate of GnRH_G";
  p_032_001 = 3.222; p_032_001 is "rate of receptor inactivation";
  p_032_002 = 32.218; p_032_002 is "rate of receptor activation";
  p_033_001 = 8.949e-5; p_033_001 is "synthesis rate of inactive receptors";
  p_033_002 = 32.218; p_033_002 is "dissociation rate of inactive receptor-complex";
  p_033_003 = 0.0895; p_033_003 is "degradation rate of inactive receptors";
  p_034_001 = 32.218; p_034_001 is "rate of receptor-complex inactivation";
  p_034_002 = 3.222; p_034_002 is "rate of receptor-complex activation";
  p_035_001 = 0.00895; p_035_001 is "degradation rate of inactive receptor-complex";

  // Assignment rules:
  freq := p_029_001*Hminus(Progesterone, p_029_002, p_029_003)*(1 + p_029_004*Hplus(E2, p_029_005, p_029_006));
  mass := p_030_001*(Hplus(E2, p_030_002, p_030_003) + Hminus(E2, p_030_004, p_030_005));

  // Reactions:
  re001: => LH_pit; (p_001_001 + p_001_002*Hplus(E2, p_001_003, p_001_004))*Hminus(Progesterone, p_001_005, p_001_006);
  re002: LH_pit => ; (p_001_007 + p_001_008*Hplus(GnRH_R_a, p_001_009, p_001_010))*LH_pit;
  re003: => LH_blood; (p_001_007 + p_001_008*Hplus(GnRH_R_a, p_001_009, p_001_010))*LH_pit/p_002_001;
  re004: LH_blood + R_LH => LH_R; p_002_002*LH_blood*R_LH;
  re005: LH_blood => ; p_002_003*LH_blood;
  re006: R_LH_des => R_LH; p_003_001*R_LH_des;
  re007: LH_R => R_LH_des; p_004_001*LH_R;
  re008: => FSH_pit; p_006_001/(1 + (InhA_tau/p_006_002)^p_006_003 + (InhB/p_006_004)^p_006_005)*Hminus(freq, p_006_006, p_006_007);
  re009: FSH_pit => ; (p_006_008 + p_006_009*Hplus(GnRH_R_a, p_006_010, p_006_011))*FSH_pit;
  re010: => FSH_blood; (p_006_008 + p_006_009*Hplus(GnRH_R_a, p_006_010, p_006_011))*FSH_pit/p_002_001;
  re011: FSH_blood + R_FSH => FSH_R; p_007_001*R_FSH*FSH_blood;
  re012: FSH_blood => ; p_007_002*FSH_blood;
  re013: R_FSH_des => R_FSH; p_008_001*R_FSH_des;
  re014: FSH_R => R_FSH_des; p_009_001*FSH_R;
  re015: => S_foll; p_011_001*Hplus(FSH_blood, p_011_002, p_011_003);
  re016: S_foll => ; p_011_004*Hplus(Progesterone, p_011_005, p_011_006)*S_foll;
  re017: => AF1; p_012_001*Hplus(FSH_R, p_012_002, p_012_003);
  re018: AF1 => AF2; p_012_004*FSH_R*AF1;
  re019: AF2 => AF3; p_013_001*(LH_R/p_013_002)^p_013_003*S_foll*AF2;
  re020: => AF3; p_014_001*FSH_R*AF3*(1 - AF3/p_014_002);
  re021: AF3 => AF4; p_014_003*(LH_R/p_013_002)^p_014_004*S_foll*AF3;
  re022: => AF4; p_015_001*(LH_R/p_013_002)^p_015_002*AF4*(1 - AF4/p_014_002);
  re023: AF4 => PrF; p_015_003*(LH_R/p_013_002)*S_foll*AF4;
  re024: PrF => ; p_016_001*(LH_R/p_013_002)^p_016_002*S_foll*PrF;
  re025: => OvF; p_017_001*(LH_R/p_013_002)^p_016_002*S_foll*Hplus(PrF, p_017_002, p_017_003);
  re026: OvF => ; p_017_004*OvF;
  re027: => Sc1; p_018_001*Hplus(OvF, p_018_002, p_018_003);
  re028: Sc1 => Sc2; p_018_004*Sc1;
  re029: Sc2 => Lut1; p_019_001*Sc2;
  re030: Lut1 => Lut2; p_020_001*Lut1;
  re031: Lut1 => ; p_020_001*p_020_002*Hplus(GnRH_R_a, p_020_003, p_020_004)*Lut1;
  re032: Lut2 => Lut3; p_021_001*Lut2;
  re033: Lut2 => ; p_021_001*p_020_002*Hplus(GnRH_R_a, p_020_003, p_020_004)*Lut2;
  re034: Lut3 => Lut4; p_022_001*Lut3;
  re035: Lut3 => ; p_022_001*p_020_002*Hplus(GnRH_R_a, p_020_003, p_020_004)*Lut3;
  re036: Lut4 => ; p_023_001*(1 + p_020_002*Hplus(GnRH_R_a, p_020_003, p_020_004))*Lut4;
  re037: => E2; p_024_001 + p_024_002*AF2 + p_024_003*LH_blood*AF3 + p_024_004*AF4 + p_024_005*LH_blood*PrF + p_024_006*Lut1 + p_024_007*Lut4;
  re038: E2 => ; p_024_008*E2;
  re039: => Progesterone; p_025_001 + p_025_002*Lut4;
  re040: Progesterone => ; p_025_003*Progesterone;
  re041: => InhA; p_026_001 + p_026_002*PrF + p_026_003*Sc1 + p_026_004*Lut1 + p_026_005*Lut2 + p_026_006*Lut3 + p_026_007*Lut4;
  re042: InhA => InhA_tau; p_026_008*InhA;
  re043: => InhB; p_027_001 + p_027_002*AF2 + p_027_003*Sc2;
  re044: InhB => ; p_027_004*InhB;
  re045: InhA_tau => ; p_028_001*InhA_tau;
  re046: => GnRH_G; mass*freq;
  re047: GnRH_G + R_GnRH_a => GnRH_R_a; p_031_001*R_GnRH_a*GnRH_G;
  re048: GnRH_R_a => GnRH_G + R_GnRH_a; p_031_002*GnRH_R_a;
  re049: GnRH_G => ; p_031_003*GnRH_G;
  re050: R_GnRH_a => R_GnRH_i; p_032_001*R_GnRH_a;
  re051: R_GnRH_i => R_GnRH_a; p_032_002*R_GnRH_i;
  re052: => R_GnRH_i; p_033_001;
  re053: GnRH_R_i => R_GnRH_i; p_033_002*GnRH_R_i;
  re054: R_GnRH_i => ; p_033_003*R_GnRH_i;
  re055: GnRH_R_a => GnRH_R_i; p_034_001*GnRH_R_a;
  re056: GnRH_R_i => GnRH_R_a; p_034_002*GnRH_R_i;
  re057: GnRH_R_i => ; p_035_001*GnRH_R_i;
end
