// SBML level 3 version 1

model potassium()

  // Compartments:
  compartment default = 1;
  compartment intracell = 10.2;
  compartment extracell = 22.8;

  // Species:
  species K_ECF in extracell = 0.1751368;
  species K_ICF in intracell = 0.897326;
  species K_urin in default = 1e-9/default;
  substanceOnly species K_tiss in default = 1509.6;
  substanceOnly species K_sal in default = 4.538189;
  substanceOnly species met_act in default = 6.248851;
  species K_ECF_mmol in extracell;
  species K_ICF_mmol in intracell;
  substanceOnly species K_git in default = 43.13656;
  species Gluc_b in extracell = 0.5465665;
  species ins_b in extracell = 21.8533;
  substanceOnly species Gluc_stor in default = 3647.747;
  substanceOnly species Gluc_prod in default = 34.03372;
  species Gluc_use in default = 1e-9;
  substanceOnly species sa4_degraded in default = 1e-9;
  substanceOnly species src_metact in default = 1e-9;
  substanceOnly species snk_metact in default = 1e-9;
  substanceOnly species src_insnew in extracell = 1e-9;
  substanceOnly species snk_insnew in extracell = 1e-9;
  substanceOnly species src_Kgit in default = 1e-9;
  substanceOnly species src_Glucblood in extracell = 1e-9;
  substanceOnly species src_Gep in default = 1e-9;

  // Parameters:
  p3 = 22;
  p4 = 0.0001783;
  p5 = 0.563;
  p6 = 0.051;
  p8 = 0.5994;
  p9 = 0.4016;
  p13 = 6.08;
  p14 = 0.15639932;
  p15 = 32;
  p16 = 10;
  p18 = 0.0223;
  p19 = 0.1373;
  p20 = 7.38;
  p21 = 0.1085;
  p22 = 0.25;
  p23 = 0.58649745;
  p24 = 0.1962811;
  p25 = 6.6085;
  p26 = 49.0279;
  p27 = 0.232634885;
  p29 = 0.11729949;
  p30 = 0.95;
  p31 = 0.353;
  p32 = 1.31;
  p33 = 0.07819966;
  p42 = 4.5; p42 is "src_metact";
  T_src_metact = 10;
  snc_metact = 1.2;
  basic_metact = 3;
  src_glucfeed = 0.0854;
  scale_blood_gluc = 0.08;
  p49 = 800;
  p41 = 20;
  kmilk_content = 1.4;
  basal_KeKu = 0.01;
  dmi_percentage = 1;
  Milk_in_l_h = 1e-9; Milk_in_l_h is "Milk_in_l/h";
  perctK_in_dmi = 0.01137;
  con = 0.0390983;
  p1 = 40.4;
  p11 = 860;
  p12 = 0.0105;
  p17 = 16;
  p28 = 25;
  p37 = 0;
  p39 = 30;
  p50 = 0.4;
  p7 = 0.925;
  p51 = 0.1;
  p57 = 3800;
  p59 = 1;
  p60 = 2;
  p61 = 5;
  p40 = 0.01;
  p47 = 72;
  p58 = 0.01;
  p63 = 800;
  p64 = 0.2;
  p65 = 0.3;
  p66 = 1.4;
  p2 = 1600;
  p10 = 1400;
  p35 = 100;
  p62 = 1;
  p38 = 1509.6;
  p36 = 1;

  // Assignment rules:
  pH := 7.5 - met_act/40;
  dmi := dmi_percentage*487.5*(1 - sin(pi*time/12));
  K_feed := perctK_in_dmi*dmi;
  Gluc_feed := src_glucfeed*dmi;
  K_ECF_mmol := K_ECF/con;
  K_ICF_mmol := K_ICF/con;

  // Reactions:
  DmMa: src_metact => met_act; basic_metact + p42*dmi^2/(dmi^2 + T_src_metact^2);
  GbGs: Gluc_b => Gluc_stor; Gluc_feed^10/(Gluc_feed^10 + p1^10)*p12*Gluc_prod*p57^10/(Gluc_stor^10 + p57^10)*ins_b*Gluc_b*p36^10/(p36^10 + Milk_in_l_h^10);  // modifiers: ins_b, Gluc_prod
  GpGb: Gluc_prod => Gluc_b; (p37 + p39*Gluc_prod)*(1/(1 + (Gluc_b/p50)^10));
  GpGs: Gluc_prod => Gluc_stor; p51*Gluc_prod*(p57^10/(Gluc_stor^10 + p57^10))*p62^10/(p62^10 + Milk_in_l_h^10);
  GsGb: Gluc_stor => Gluc_b; 1/(1 + (Gluc_feed/p1)^10)*p17*(p7 - Gluc_b)*Gluc_stor^10/(Gluc_stor^10 + p35^10) + 1/(1 + (p64/Milk_in_l_h)^10)*p65^10/(p65^10 + Gluc_b^10)*p63*Gluc_stor^10/(Gluc_stor^10 + p35^10);
  GsGp: Gluc_stor => Gluc_prod; p60*1/(1 + (Gluc_feed/p61)^5)*Gluc_stor^10/(Gluc_stor^10 + p35^10);
  KeKi: K_ECF => K_ICF; (p8 + p9*ins_b^8/(ins_b^8 + p3^8))*K_ECF^2/(K_ECF^2 + p33^2)*(1 + p21*pH^10/(pH^10 + p20^10));  // modifiers: ins_b
  KeKs: K_ECF => K_sal; p18*K_ECF*dmi;
  KeKt: K_ECF => K_tiss; K_git^10/(K_git^10 + p15^10)*p25*K_ECF*(p2 - p10)^10/((K_tiss - p10)^10 + (p2 - p10)^10);  // modifiers: K_git
  KeKu: K_ECF => K_urin; (1 + p13*K_ECF^5/(K_ECF^5 + p24^5))*p6*K_git*(1 + p16*K_ECF^10/(K_ECF^10 + p22^10)) + basal_KeKu*K_ECF;  // modifiers: K_git
  KeR: K_ECF => sa4_degraded; p4*K_ECF;
  KfKg: src_Kgit => K_git; p30*K_feed;
  KgKe: K_git => K_ECF; p31*K_git;
  KiKe: K_ICF => K_ECF; (1 + 1/(1 + (K_ECF/p29)^10))*p5*(1 + 1/(1 + (pH/p20)^10))*K_ICF^2/(K_ICF^2 + p23^2)*(1 + p19*K_ICF^2/(K_ICF^2 + p14^2));
  KsKg: K_sal => K_git; p32*K_sal;
  KtKe: K_tiss => K_ECF; 1/(1 + (K_git/p15)^10)*p26*(p27 - K_ECF)*(K_tiss - p10)^10/((K_tiss - p10)^10 + (p38*0.99 - p10)^10);  // modifiers: K_git
  MaSnk: met_act => snk_metact; snc_metact*met_act;
  SnkGb: Gluc_b => Gluc_use; Gluc_b^10/(Gluc_b^10 + p58^10)*(p28*Gluc_b + p59*Gluc_prod*exp(-p66*Milk_in_l_h) + Milk_in_l_h*p47);  // modifiers: Gluc_prod
  SnkIn: ins_b => snk_insnew; p41*ins_b;
  SrcGb: src_Glucblood => Gluc_b; scale_blood_gluc*Gluc_feed;
  SrcGp: src_Gep => Gluc_prod; (1 - scale_blood_gluc)*Gluc_feed;
  SrcIn: src_insnew => ins_b; p49*Gluc_b;  // modifiers: Gluc_b

  // Unit definitions:
  unit substance = mole;
  unit volume = litre;
  unit area = metre^2;
  unit length = metre;
  unit time = second;
end
