// SBML level 2 version 4

model potassium()

  // Compartments:
  compartment default = 1 volume;
  compartment intracell in default = 1.9938 volume;
  compartment extracell in default = 0.8916 volume;

  // Species:
  species K_ECF in extracell = 3.43;
  substanceOnly species K_ICF in intracell = 25.42;
  species K_urin in default = 0;
  substanceOnly species K_git in default = 3.073;
  substanceOnly species K_tiss in default = 1509.6;
  substanceOnly species K_sal in default = 0.434;
  substanceOnly species K_feed in default = 0;
  substanceOnly species $sa4_degraded in extracell = 0;
  substanceOnly species $sa10_degraded in extracell = 0;
  substanceOnly species $s18 in extracell = 0;
  substanceOnly species Insulin in extracell = 22; Insulin is "insulin";
  substanceOnly species dmi in default = 731.25;
  substanceOnly species met_act in default = 3;
  substanceOnly species Gluc_feed in default = 62.5;
  substanceOnly species $src_Gluc_feed in default = 0;
  substanceOnly species Glucose in extracell = 3.73;
  substanceOnly species $snc_Gluc_extracell in extracell = 0;
  substanceOnly species $snc_gluc_feed_default in default = 0;
  substanceOnly species $src_metact_default in default = 0;
  substanceOnly species $snk_metact in default = 0;
  substanceOnly species $src_Kfeed in default = 0;

  // Parameters:
  p1 = 3.73 dimensionless;
  p2 = 34 dimensionless;
  p3 = 24.5 dimensionless;
  p4 = 0.0002 dimensionless;
  p5 = 14.04 dimensionless;
  p6 = 0.05 dimensionless;
  p7 = 75 dimensionless;
  p8 = 14.91 dimensionless;
  p9 = 9.99 dimensionless;
  p10 = 600 dimensionless;
  p11 = 3.43 dimensionless;
  p12 = 25.42 dimensionless;
  p13 = 6.01 dimensionless;
  p14 = 4 dimensionless;
  p15 = 22 dimensionless;
  p16 = 3 dimensionless;
  p17 = 0.309 dimensionless;
  p18 = 0.08 dimensionless;
  p19 = 0.1373 dimensionless;
  p20 = 7.38 dimensionless;
  p21 = 0.1085 dimensionless;
  p22 = 8 dimensionless;
  p23 = 15 dimensionless;
  p24 = 5 dimensionless;
  p25 = 0.2898 dimensionless;
  p26 = 2.15 dimensionless;
  p27 = 5.95 dimensionless;
  p28 = 0.0011 dimensionless;
  p29 = 3 dimensionless;
  p30 = 0.95 dimensionless;
  p31 = 0.35 dimensionless;
  p32 = 0.8 dimensionless;
  p33 = 2 dimensionless;
  con = 1.1216 dimensionless;
  con_vol = 2.23624 dimensionless;
  pH has dimensionless;
  K_in_dmi = 0.01135 dimensionless;
  dmi_night = 0 dimensionless;
  dmi_day = 731.25 dimensionless;
  src_metact = 4.5 dimensionless;
  T_src_metact = 10 dimensionless;
  snc_metact = 1.2 dimensionless;
  basic_metact = 3 dimensionless;
  src_glucfeed = 0.0854 dimensionless;
  snc_Gluc = 1 dimensionless;
  scale_blood_gluc = 0.015 dimensionless;
  snc_gluc_feed = 0.985 dimensionless;
  snc_insulin = 7 dimensionless;

  // Assignment rules:
  pH := 7.5 - met_act/40;

  // Reactions:
  KiKe: K_ICF => K_ECF; (1 + 1/(1 + (K_ECF/p29)^10))*p5*(1 + 1/(1 + (pH/p20)^10))*K_ICF^2/(K_ICF^2 + p23^2)*(1 + p19*K_ICF^2/(K_ICF^2 + p14^2))/con;
  KeKi: K_ECF => K_ICF; (p8 + p9*Insulin^10/(Insulin^10 + p3^10))*K_ECF^2/(K_ECF^2 + p33^2)*(1 + p21*pH^10/(pH^10 + p20^10))/con;  // modifiers: Insulin
  KeKs: K_ECF => K_sal; p18*K_ECF/con;
  KeR: K_ECF => $sa4_degraded; p4*K_ECF/con;
  KeKt: K_ECF => K_tiss; K_git^10/(K_git^10 + p15^10)*p25*K_ECF/con;  // modifiers: K_git
  KtKe: K_tiss => K_ECF; 1/(1 + (K_git/p15)^10)*p26*(p27 - K_ECF)*K_tiss^10/(K_tiss^10 + 1468.375^10)/con;  // modifiers: K_git
  KeKu: K_ECF => K_urin; (1 + p13*K_ECF^5/(K_ECF^5 + p24^5))*p6*K_git*(1 + p16*K_ECF*K_ECF^10/(K_ECF^10 + p22^10));  // modifiers: K_git
  KgKe: K_git => K_ECF; p31*K_git;
  KsKg: K_sal => K_git; p32*K_sal;
  degr_insulin: Insulin => $sa10_degraded; snc_insulin*Insulin;
  syn_insulin: $s18 => Insulin; p3 + p2*Glucose;  // modifiers: Glucose
  re19: K_feed => K_git; p30*K_feed;
  re20: $src_metact_default => met_act; basic_metact + src_metact*dmi^2/(dmi^2 + T_src_metact^2);  // modifiers: dmi
  re21: met_act => $snk_metact; snc_metact*met_act;
  re24: $src_Kfeed => K_feed; K_in_dmi*dmi;  // modifiers: dmi
  re25: $src_Gluc_feed => Gluc_feed; src_glucfeed*dmi;  // modifiers: dmi
  re26: Gluc_feed => Glucose; 3 + scale_blood_gluc*Gluc_feed;
  re27: Glucose => $snc_Gluc_extracell; snc_Gluc*Glucose;
  re28: Gluc_feed => $snc_gluc_feed_default; snc_gluc_feed*Gluc_feed;

  // Events:
  n1: at (time >= 17): dmi = dmi_night;
  d2: at (time >= 25): dmi = dmi_day;
  n2: at (time >= 41): dmi = dmi_night;
  d1: at (time >= 1): dmi = dmi_day;
  d3: at (time >= 49): dmi = dmi_day;
  n3: at (time >= 65): dmi = dmi_night;

  // Unit definitions:
  unit substance = mole;
  unit volume = litre;
  unit area = metre^2;
  unit length = metre;
  unit time = second;
end
